*Heading
** Job name: Type_b_ABAQUS Model name: Model-1
** Generated by: Abaqus/CAE 6.14-1
*Preprint, echo=NO, model=NO, history=NO, contact=NO
**
** PARTS
**
*Part, name=Part-1
*Node
      1, 0.0500000007,           0.,           0.
      2, 0.0500000007,           0.,  0.200000003
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*Element, type=C3D10
   1,  341,  342,  343,  344,  651,  650,  649,  653,  652,  654
   2,  341,  116,  344,   96,  656,  655,  653,  658,  657,  659
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*Nset, nset=_PickedSet2, internal, generate
    1,  4404,     1
*Elset, elset=_PickedSet2, internal, generate
    1,  2771,     1
** Section: Cam
*Solid Section, elset=_PickedSet2, material=Cam
,
*End Part
**
**
** ASSEMBLY
**
*Assembly, name=Assembly
**
*Instance, name=Part-1-1, part=Part-1
*End Instance
**
*Node
      1,           0.,           0.,         0.25
*Nset, nset=Set-13, instance=Part-1-1
    1,    3,    4,    5,    6,    7
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*Elset, elset=Set-13, instance=Part-1-1
  363,  668,  810,  912, 1018, 1109
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*Nset, nset=Set-14, instance=Part-1-1, generate
    1,  4404,     1
*Elset, elset=Set-14, instance=Part-1-1, generate
    1,  2771,     1
*Nset, nset=Set-15, instance=Part-1-1, generate
    1,  4404,     1
*Nset, nset=Set-15
 1,
*Elset, elset=Set-15, instance=Part-1-1, generate
    1,  2771,     1
*Nset, nset=_PickedSet6, internal
 1,
*Nset, nset=_PickedSet10, internal
 1,
*Nset, nset=_PickedSet14, internal
 1,
*Nset, nset=_PickedSet15, internal
 1,
*Nset, nset=_PickedSet16, internal
 1,
*Nset, nset=_PickedSet17, internal
 1,
*Nset, nset=_PickedSet19, internal
 1,
*Nset, nset=_PickedSet20, internal
 1,
*Elset, elset=_Surf-3_S3, internal, instance=Part-1-1
   37,   47,  100,  108,  121,  137
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*Elset, elset=_Surf-3_S1, internal, instance=Part-1-1
  480,  728,  767, 1109, 1429, 1712
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*Elset, elset=_Surf-3_S2, internal, instance=Part-1-1
  505, 1020, 1683, 1690, 1712, 1747
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*Elset, elset=_Surf-3_S4, internal, instance=Part-1-1
  579,  588,  645,  771,  810,  827
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*Surface, type=ELEMENT, name=Surf-3
_Surf-3_S3, S3
_Surf-3_S1, S1
_Surf-3_S2, S2
_Surf-3_S4, S4
*Elset, elset=_s_Surf-3_S3, internal, instance=Part-1-1
  211,  238,  308,  309,  417,  435
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*Elset, elset=_s_Surf-3_S4, internal, instance=Part-1-1
  579,  827, 1314, 1512, 1856, 2042, 2118, 2149, 2184, 2548
*Elset, elset=_s_Surf-3_S1, internal, instance=Part-1-1
  767, 1964, 1985, 2132, 2309, 2317, 2327, 2330, 2338, 2396, 2413
*Elset, elset=_s_Surf-3_S2, internal, instance=Part-1-1
 1020, 1770, 1971, 2021, 2034, 2178, 2197, 2259, 2262, 2321, 2362
*Surface, type=ELEMENT, name=s_Surf-3
_s_Surf-3_S3, S3
_s_Surf-3_S4, S4
_s_Surf-3_S2, S2
_s_Surf-3_S1, S1
** Constraint: Constraint-1
*Coupling, constraint name=Constraint-1, ref node=_PickedSet6, surface=s_Surf-3
*Kinematic
*End Assembly
*Amplitude, name=Amp-1
             0.,              0.,              1.,              1.
*Amplitude, name=Amp-2
             0.,              1.,              2.,             -1.
*Amplitude, name=Amp-3
             0.,             -1.,              3.,              2.
*Amplitude, name=Amp-4
             0.,              2.,              4.,             -2.
*Amplitude, name=Amp-5
             0.,             -2.,              5.,              3.
*Amplitude, name=Amp-6
             0.,              3.,              6.,             -3.
*Amplitude, name=Amp-7
             0.,             -3.,              7.,              4.
*Amplitude, name=Amp-8
             0.,              4.,              8.,             -4.
*Amplitude, name=Amp-9
             0.,             -4.,              9.,              5.
*Amplitude, name=Amp-10
             0.,              5.,             10.,             -5.
*Amplitude, name=Amp-11
             0.,             -5.,             11.,              6.
*Amplitude, name=Amp-12
             0.,              6.,             12.,             -6.
*Amplitude, name=Amp-13
             0.,             -6.,             13.,              7.
*Amplitude, name=Amp-14
             0.,              7.,             14.,             -7.
*Amplitude, name=Amp-15
             0.,             -7.,             15.,              8.
*Amplitude, name=Amp20
             0.,              0.,            0.05,             0.1,             0.1,            0.05,            0.15,            0.15
            0.2,             0.1,            0.25,             0.2,             0.3,            0.15,            0.35,            0.25
            0.4,             0.2,            0.45,             0.3,             0.5,            0.25,            0.55,            0.35
            0.6,             0.3,            0.65,             0.4,             0.7,            0.35,            0.75,            0.45
            0.8,             0.4,            0.85,             0.5,             0.9,            0.45,            0.95,            0.55
             1.,             0.5
*Amplitude, name=Amp40
             0.,              0.,           0.025,             0.1,            0.05,            0.05,           0.075,            0.15
            0.1,             0.1,           0.125,             0.2,            0.15,            0.15,           0.175,            0.25
            0.2,             0.2,           0.225,             0.3,            0.25,            0.25,           0.275,            0.35
            0.3,             0.3,           0.325,             0.4,            0.35,            0.35,           0.375,            0.45
            0.4,             0.4,           0.425,             0.5,            0.45,            0.45,           0.475,            0.55
            0.5,             0.5,           0.525,             0.6,            0.55,            0.55,           0.575,            0.65
            0.6,             0.6,           0.625,             0.7,            0.65,            0.65,           0.675,            0.75
            0.7,             0.7,           0.725,             0.8,            0.75,            0.75,           0.775,            0.85
            0.8,             0.8,           0.825,             0.9,            0.85,            0.85,           0.875,            0.95
            0.9,             0.9,           0.925,              1.,            0.95,            0.95,           0.975,            1.05
             1.,              1.
*Amplitude, name=Amp50
             0.,              0.,            0.02,            0.04,            0.04,            0.02,            0.06,            0.06
           0.08,            0.04,             0.1,            0.08,            0.12,            0.06,            0.14,             0.1
           0.16,            0.08,            0.18,            0.12,             0.2,             0.1,            0.22,            0.14
           0.24,            0.12,            0.26,            0.16,            0.28,            0.14,             0.3,            0.18
           0.32,            0.16,            0.34,             0.2,            0.36,            0.18,            0.38,            0.22
            0.4,             0.2,            0.42,            0.24,            0.44,            0.22,            0.46,            0.26
           0.48,            0.24,             0.5,            0.28,            0.52,            0.26,            0.54,             0.3
           0.56,            0.28,            0.58,            0.32,             0.6,             0.3,            0.62,            0.34
           0.64,            0.32,            0.66,            0.36,            0.68,            0.34,             0.7,            0.38
           0.72,            0.36,            0.74,             0.4,            0.76,            0.38,            0.78,            0.42
            0.8,             0.4,            0.82,            0.44,            0.84,            0.42,            0.86,            0.46
           0.88,            0.44,             0.9,            0.48,            0.92,            0.46,            0.94,             0.5
           0.96,            0.48,            0.98,            0.52,              1.,             0.5
*Amplitude, name=Amp200
             0.,              0.,           0.005,           0.005,            0.01,            0.01,           0.015,           0.005
           0.02,           0.015,           0.025,            0.01,            0.03,            0.02,           0.035,           0.015
           0.04,           0.025,           0.045,            0.02,            0.05,            0.03,           0.055,           0.025
           0.06,           0.035,           0.065,            0.03,            0.07,            0.04,           0.075,           0.035
           0.08,           0.045,           0.085,            0.04,            0.09,            0.05,           0.095,           0.045
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             1.,             0.5
**
** MATERIALS
**
*Material, name=Cam
*Clay Plasticity
 0.15,  1.,100.,  1.,  1.
*Porous Elastic
 0.05, 0.3,  0.
*Material, name=Soil
*Depvar
      8,
*User Material, constants=5, unsymm
 0.15, 0.05,   1.,  0.3,  0.5
**
** BOUNDARY CONDITIONS
**
** Name: Bottom_BC Type: Displacement/Rotation
*Boundary
Set-13, 1, 1
Set-13, 2, 2
Set-13, 3, 3
Set-13, 4, 4
Set-13, 5, 5
Set-13, 6, 6
**
** PREDEFINED FIELDS
**
** Name: Initial void ratio   Type: Void ratio
*Initial Conditions, TYPE=RATIO
Set-15, 0.5
** Name: Stress   Type: Stress
*Initial Conditions, type=STRESS
Set-14, -200., -200., -200., 0., 0., 0.
** ----------------------------------------------------------------
**
** STEP: Geostatic
**
*Step, name=Geostatic, nlgeom=NO
*Geostatic
**
** LOADS
**
** Name: Load-1   Type: Pressure
*Dsload
Surf-3, P, 200.
**
** OUTPUT REQUESTS
**
*Restart, write, frequency=0
**
** FIELD OUTPUT: F-Output-1
**
*Output, field
*Node Output
CF, POR, RF, U
*Element Output, directions=YES
E, LE, PEEQ, S, SAT, SDV, VOIDR
*Contact Output
CDISP, CSTRESS
**
** HISTORY OUTPUT: H-Output-1
**
*Output, history, variable=PRESELECT
*End Step
** ----------------------------------------------------------------
**
** STEP: load1
**
*Step, name=load1, nlgeom=NO, inc=10000
*Static
0.1, 1., 1e-08, 1.
**
** BOUNDARY CONDITIONS
**
** Name: Top_load Type: Displacement/Rotation
*Boundary, amplitude=Amp-1
_PickedSet10, 1, 1, 0.02
_PickedSet10, 2, 2
_PickedSet10, 3, 3
_PickedSet10, 4, 4
_PickedSet10, 5, 5
_PickedSet10, 6, 6
**
** OUTPUT REQUESTS
**
*Restart, write, frequency=0
**
** FIELD OUTPUT: F-Output-1
**
*Output, field
*Node Output
CF, RF, U
*Element Output, directions=YES
E, LE, PEEQ, S, SDV
*Contact Output
CDISP, CSTRESS
**
** HISTORY OUTPUT: H-Output-1
**
*Output, history, variable=PRESELECT
*End Step
** ----------------------------------------------------------------
**
** STEP: load2
**
*Step, name=load2, nlgeom=NO, inc=10000
*Static
0.1, 2., 1e-08, 2.
**
** BOUNDARY CONDITIONS
**
** Name: Bottom_BC Type: Displacement/Rotation
*Boundary, op=NEW
Set-13, 1, 1
Set-13, 2, 2
Set-13, 3, 3
Set-13, 4, 4
Set-13, 5, 5
Set-13, 6, 6
** Name: Top_load Type: Displacement/Rotation
*Boundary, op=NEW
** Name: load2 Type: Displacement/Rotation
*Boundary, op=NEW, amplitude=Amp-2
_PickedSet14, 1, 1, 0.02
_PickedSet14, 2, 2
_PickedSet14, 3, 3
_PickedSet14, 4, 4
_PickedSet14, 5, 5
_PickedSet14, 6, 6
**
** OUTPUT REQUESTS
**
*Restart, write, frequency=0
**
** FIELD OUTPUT: F-Output-1
**
*Output, field
*Node Output
CF, RF, U
*Element Output, directions=YES
E, LE, PEEQ, S, SDV
*Contact Output
CDISP, CSTRESS
**
** HISTORY OUTPUT: H-Output-1
**
*Output, history, variable=PRESELECT
*End Step
** ----------------------------------------------------------------
**
** STEP: load3
**
*Step, name=load3, nlgeom=NO, inc=10000
*Static
0.1, 3., 1e-08, 3.
**
** BOUNDARY CONDITIONS
**
** Name: Bottom_BC Type: Displacement/Rotation
*Boundary, op=NEW
Set-13, 1, 1
Set-13, 2, 2
Set-13, 3, 3
Set-13, 4, 4
Set-13, 5, 5
Set-13, 6, 6
** Name: load2 Type: Displacement/Rotation
*Boundary, op=NEW
** Name: load3 Type: Displacement/Rotation
*Boundary, op=NEW, amplitude=Amp-3
_PickedSet15, 1, 1, 0.02
_PickedSet15, 2, 2
_PickedSet15, 3, 3
_PickedSet15, 4, 4
_PickedSet15, 5, 5
_PickedSet15, 6, 6
**
** OUTPUT REQUESTS
**
*Restart, write, frequency=0
**
** FIELD OUTPUT: F-Output-1
**
*Output, field
*Node Output
CF, RF, U
*Element Output, directions=YES
E, LE, PEEQ, S, SDV
*Contact Output
CDISP, CSTRESS
**
** HISTORY OUTPUT: H-Output-1
**
*Output, history, variable=PRESELECT
*End Step
** ----------------------------------------------------------------
**
** STEP: load4
**
*Step, name=load4, nlgeom=NO, inc=10000
*Static
0.1, 4., 1e-08, 4.
**
** BOUNDARY CONDITIONS
**
** Name: Bottom_BC Type: Displacement/Rotation
*Boundary, op=NEW
Set-13, 1, 1
Set-13, 2, 2
Set-13, 3, 3
Set-13, 4, 4
Set-13, 5, 5
Set-13, 6, 6
** Name: load3 Type: Displacement/Rotation
*Boundary, op=NEW
** Name: load4 Type: Displacement/Rotation
*Boundary, op=NEW, amplitude=Amp-4
_PickedSet16, 1, 1, 0.02
_PickedSet16, 2, 2
_PickedSet16, 3, 3
_PickedSet16, 4, 4
_PickedSet16, 5, 5
_PickedSet16, 6, 6
**
** OUTPUT REQUESTS
**
*Restart, write, frequency=0
**
** FIELD OUTPUT: F-Output-1
**
*Output, field
*Node Output
CF, RF, U
*Element Output, directions=YES
E, LE, PEEQ, S, SDV
*Contact Output
CDISP, CSTRESS
**
** HISTORY OUTPUT: H-Output-1
**
*Output, history, variable=PRESELECT
*End Step
** ----------------------------------------------------------------
**
** STEP: load5
**
*Step, name=load5, nlgeom=NO, inc=10000
*Static
0.1, 5., 1e-08, 5.
**
** BOUNDARY CONDITIONS
**
** Name: Bottom_BC Type: Displacement/Rotation
*Boundary, op=NEW
Set-13, 1, 1
Set-13, 2, 2
Set-13, 3, 3
Set-13, 4, 4
Set-13, 5, 5
Set-13, 6, 6
** Name: load4 Type: Displacement/Rotation
*Boundary, op=NEW
** Name: load5 Type: Displacement/Rotation
*Boundary, op=NEW, amplitude=Amp-5
_PickedSet17, 1, 1, 0.02
_PickedSet17, 2, 2
_PickedSet17, 3, 3
_PickedSet17, 4, 4
_PickedSet17, 5, 5
_PickedSet17, 6, 6
**
** OUTPUT REQUESTS
**
*Restart, write, frequency=0
**
** FIELD OUTPUT: F-Output-1
**
*Output, field
*Node Output
CF, RF, U
*Element Output, directions=YES
E, LE, PEEQ, S, SDV
*Contact Output
CDISP, CSTRESS
**
** HISTORY OUTPUT: H-Output-1
**
*Output, history, variable=PRESELECT
*End Step
** ----------------------------------------------------------------
**
** STEP: load6
**
*Step, name=load6, nlgeom=NO, inc=10000
*Static
0.1, 6., 1e-08, 6.
**
** BOUNDARY CONDITIONS
**
** Name: Bottom_BC Type: Displacement/Rotation
*Boundary, op=NEW
Set-13, 1, 1
Set-13, 2, 2
Set-13, 3, 3
Set-13, 4, 4
Set-13, 5, 5
Set-13, 6, 6
** Name: load5 Type: Displacement/Rotation
*Boundary, op=NEW
** Name: load6 Type: Displacement/Rotation
*Boundary, op=NEW, amplitude=Amp-6
_PickedSet19, 1, 1, 0.02
_PickedSet19, 2, 2
_PickedSet19, 3, 3
_PickedSet19, 4, 4
_PickedSet19, 5, 5
_PickedSet19, 6, 6
**
** OUTPUT REQUESTS
**
*Restart, write, frequency=0
**
** FIELD OUTPUT: F-Output-1
**
*Output, field
*Node Output
CF, RF, U
*Element Output, directions=YES
E, LE, PEEQ, S, SDV
*Contact Output
CDISP, CSTRESS
**
** HISTORY OUTPUT: H-Output-1
**
*Output, history, variable=PRESELECT
*End Step
** ----------------------------------------------------------------
**
** STEP: load7
**
*Step, name=load7, nlgeom=NO, inc=10000
*Static
0.1, 7., 1e-08, 7.
**
** BOUNDARY CONDITIONS
**
** Name: Bottom_BC Type: Displacement/Rotation
*Boundary, op=NEW
Set-13, 1, 1
Set-13, 2, 2
Set-13, 3, 3
Set-13, 4, 4
Set-13, 5, 5
Set-13, 6, 6
** Name: load6 Type: Displacement/Rotation
*Boundary, op=NEW
** Name: load7 Type: Displacement/Rotation
*Boundary, op=NEW, amplitude=Amp-7
_PickedSet20, 1, 1, 0.02
_PickedSet20, 2, 2
_PickedSet20, 3, 3
_PickedSet20, 4, 4
_PickedSet20, 5, 5
_PickedSet20, 6, 6
**
** OUTPUT REQUESTS
**
*Restart, write, frequency=0
**
** FIELD OUTPUT: F-Output-1
**
*Output, field
*Node Output
CF, RF, U
*Element Output, directions=YES
E, LE, PEEQ, S, SDV
*Contact Output
CDISP, CSTRESS
**
** HISTORY OUTPUT: H-Output-1
**
*Output, history, variable=PRESELECT
*End Step
** ----------------------------------------------------------------
**
** STEP: load8
**
*Step, name=load8, nlgeom=NO, inc=10000
*Static
0.1, 8., 1e-08, 8.
**
** BOUNDARY CONDITIONS
**
** Name: Bottom_BC Type: Displacement/Rotation
*Boundary, op=NEW
Set-13, 1, 1
Set-13, 2, 2
Set-13, 3, 3
Set-13, 4, 4
Set-13, 5, 5
Set-13, 6, 6
** Name: load7 Type: Displacement/Rotation
*Boundary, op=NEW
** Name: load8 Type: Displacement/Rotation
*Boundary, op=NEW, amplitude=Amp-8
_PickedSet20, 1, 1, 0.02
_PickedSet20, 2, 2
_PickedSet20, 3, 3
_PickedSet20, 4, 4
_PickedSet20, 5, 5
_PickedSet20, 6, 6
**
** OUTPUT REQUESTS
**
*Restart, write, frequency=0
**
** FIELD OUTPUT: F-Output-1
**
*Output, field
*Node Output
CF, RF, U
*Element Output, directions=YES
E, LE, PEEQ, S, SDV
*Contact Output
CDISP, CSTRESS
**
** HISTORY OUTPUT: H-Output-1
**
*Output, history, variable=PRESELECT
*End Step
** ----------------------------------------------------------------
**
** STEP: load9
**
*Step, name=load9, nlgeom=NO, inc=10000
*Static
0.1, 9., 1e-08, 9.
**
** BOUNDARY CONDITIONS
**
** Name: Bottom_BC Type: Displacement/Rotation
*Boundary, op=NEW
Set-13, 1, 1
Set-13, 2, 2
Set-13, 3, 3
Set-13, 4, 4
Set-13, 5, 5
Set-13, 6, 6
** Name: load8 Type: Displacement/Rotation
*Boundary, op=NEW
** Name: load9 Type: Displacement/Rotation
*Boundary, op=NEW, amplitude=Amp-9
_PickedSet20, 1, 1, 0.02
_PickedSet20, 2, 2
_PickedSet20, 3, 3
_PickedSet20, 4, 4
_PickedSet20, 5, 5
_PickedSet20, 6, 6
**
** OUTPUT REQUESTS
**
*Restart, write, frequency=0
**
** FIELD OUTPUT: F-Output-1
**
*Output, field
*Node Output
CF, RF, U
*Element Output, directions=YES
E, LE, PEEQ, S, SDV
*Contact Output
CDISP, CSTRESS
**
** HISTORY OUTPUT: H-Output-1
**
*Output, history, variable=PRESELECT
*End Step
** ----------------------------------------------------------------
**
** STEP: load10
**
*Step, name=load10, nlgeom=NO, inc=10000
*Static
0.1, 5., 1e-08, 5.
**
** BOUNDARY CONDITIONS
**
** Name: Bottom_BC Type: Displacement/Rotation
*Boundary, op=NEW
Set-13, 1, 1
Set-13, 2, 2
Set-13, 3, 3
Set-13, 4, 4
Set-13, 5, 5
Set-13, 6, 6
** Name: load9 Type: Displacement/Rotation
*Boundary, op=NEW
** Name: load10 Type: Displacement/Rotation
*Boundary, op=NEW, amplitude=Amp-10
_PickedSet20, 1, 1, 0.02
_PickedSet20, 2, 2
_PickedSet20, 3, 3
_PickedSet20, 4, 4
_PickedSet20, 5, 5
_PickedSet20, 6, 6
**
** OUTPUT REQUESTS
**
*Restart, write, frequency=0
**
** FIELD OUTPUT: F-Output-1
**
*Output, field
*Node Output
CF, RF, U
*Element Output, directions=YES
E, LE, PEEQ, S, SDV
*Contact Output
CDISP, CSTRESS
**
** HISTORY OUTPUT: H-Output-1
**
*Output, history, variable=PRESELECT
*End Step
